// COMSOL Multiphysics 5.6.0.341 model "EIS_model.mph"
// Outline of the model tree

Parameters
  f = 1 [Hz]
  phi_star = 30.42[mV]
  gamma = 8
  kappa_1 = 1.0E-3
  kappa_2 = 10
  w_elec = 1.342[cm]
  L = 120 [um]
  x_to_y = 0.2  // scale between x-axis and y-axis
  scale_ND = 1[m]/L
  L_ND = 1 [m]
  d_ND = lambda*x_to_y [m]
  w_elec_ND = w_elec*x_to_y*scale_ND
  omega = 2*pi*f
  w_big_ND = w_elec_ND+d_ND*2
  ref_distance_ND = w_elec_ND/2
  omega_bar = 1.0E-2 [Hz]
  chi = 0.1
  beta = .9
  k = 20 [S/m]
  Z_star = L/k
  sigma = ( (omega/(1 [Hz]))^beta [Hz])/omega_bar
  lambda = 20 [1]
  ref_zone_ND = w_elec_ND/20
  theta = 0.5

Variables
  var1 "Variables 1"
    Z = 1/(i_Sigma11)
    Z1_ref_o1 = (1-psi11_ref_o1)*Z
    Z2_ref_o1 = psi11_ref_o1*Z
    Z1_ref_o2 = (1-psi11_ref_o2)*Z
    Z2_ref_o2 = psi11_ref_o2*Z

Couplings
  intop1: Integration "Integration 1 - top electrode integration" on boundaries 9
  intop2: Integration "Integration 2 - bottom electrode integration" on boundaries 8

Probes
  var1: GlobalVariable "Global Variable Probe 1"
    probename = i_Sigma11
    expr = -intop2(ny*psi11y)/(w_elec*x_to_y)*L
    unit = 1
    descr = i_Sigma11
    table = tbl1
  dom1: Domain "Domain Probe 1" on domains 5
    probename = psi11_ref_o1
    expr = psi11
    unit = 1
    descr = psi11_ref_o1
    table = tbl1
  dom2: Domain "Domain Probe 2" on domains 1
    probename = psi11_ref_o2
    expr = psi11
    unit = 1
    descr = psi11_ref_o2
    table = tbl1
  var2: GlobalVariable "Global Variable Probe 2"
    probename = i_Sigma
    expr = -intop2(ny*psiy)/(w_elec*x_to_y)*L
    unit = 1
    descr = i_Sigma
    table = tbl2
  dom3: Domain "Domain Probe 3" on domains 5
    probename = psi_ref_o1
    expr = psi
    unit = 1
    descr = psi_ref_o1
    table = tbl2
  dom4: Domain "Domain Probe 4" on domains 1
    probename = psi_ref_o2
    expr = psi
    unit = 1
    descr = psi_ref_o2
    table = tbl2

Geometry
  geom1 "Geometry 1" (2D, length unit m)
    r1: Rectangle | pos = {-(w_big_ND/2+ref_distance_ND), 0}; size = {(w_big_ND)+ref_distance_ND*2, 1}
    ls1: LineSegment | specify1 = coord; coord1 = {w_big_ND/2, 1}; specify2 = coord; coord2 = {w_elec_ND/2, 0}
    ls2: LineSegment
      specify1 = coord
      coord1 = {w_big_ND/2+ref_distance_ND-ref_zone_ND, 0}
      specify2 = coord
      coord2 = {w_big_ND/2+ref_distance_ND-ref_zone_ND, 1}
    ls3: LineSegment | specify1 = coord; coord1 = {-w_big_ND/2, 0}; specify2 = coord; coord2 = {-w_elec_ND/2, 1}
    ls4: LineSegment
      specify1 = coord
      coord1 = {-(w_big_ND/2+ref_distance_ND-ref_zone_ND), 0}
      specify2 = coord
      coord2 = {-(w_big_ND/2+ref_distance_ND-ref_zone_ND), 1}
    fin: Finalize "Form Union"

Physics
  c1: CoefficientFormPDE on all domains
    dependent variable psi
    Units.CustomDependentVariableUnit = 1
    Units.CustomSourceTermUnit = 1/m^2
    cfeq1: CoefficientFormPDE (default) | c = {x_to_y^2, 0, 0, 1}
    zflx1: ZeroFluxBoundary "Zero Flux 1" (default)
    init1: init "Initial Values 1" (default) | psi = 0.; phi = 0.2
    flux1: FluxBoundary "Flux/Source 1" on boundaries 9 | g = kappa_1/lambda*sinh(gamma-psi)/(1 [m])
    flux2: FluxBoundary "Flux/Source 2" on boundaries 8 | g = -kappa_2/lambda*sinh(theta*psi)/(1 [m])
  c2: CoefficientFormPDE on all domains
    dependent variable psi11
    Units.DependentVariableQuantity = none
    Units.CustomDependentVariableUnit = 1
    Units.CustomSourceTermUnit = m^-2
    cfeq1: CoefficientFormPDE (default) | c = {x_to_y^2, 0, 0, 1}; f = 0; da = 0
    zflx1: ZeroFluxBoundary "Zero Flux 1" (default)
    init1: init "Initial Values 1" (default) | psi11 = 1
    flux1: FluxBoundary "Flux/Source 1" on boundaries 9
      g = kappa_1/lambda*(1-psi11)*( sigma*exp(1j*beta*pi/2)+cosh(gamma-psi) )/(1 [m])
      q = 0
    flux2: FluxBoundary "Flux/Source 2" on boundaries 8
      g = -kappa_2/lambda*psi11*( sigma*chi*kappa_1/kappa_2*exp(1j*beta*pi/2) + theta*cosh(theta*psi) )/(1 [m])

Mesh
  mesh1 "Mesh 1"
    size: MeshSizeDefault | hmax = 0.1; hmin = 5E-4; hauto = 1; custom = on
    size1: Size on points 6-8 | hmax = 1.0E-3; hauto = 1; custom = on
    size2: Size (disabled) on boundaries 10 | hauto = 1
    ftri1: FreeTri "Free Triangular 1" on remaining entities | xscale = x_to_y

Studies
  std1 "Study 1"
    stat: Stationary | solve for = {c1}
  std2 "Study 2"
    stat: Stationary
      solve for = {c2}
      usesol = on
      notsolmethod = sol
      notstudy = std1
      useparam = on
      pname = f
      plistarr = 10^(range(5,-0.1,-4))
      punit = Hz

Solver configurations
  sol1 "Solution 1" (study std1)
    v1: Variables "Dependent Variables 1"
    s1: Stationary "Stationary Solver 1" | stol = 1e-8
      dDef: Direct
      fc1: FullyCoupled | linsolver = dDef
  sol3 "Solution 3" (study std2)
    v1: Variables "Dependent Variables 1"
    s1: Stationary "Stationary Solver 1" | stol = 1e-8
      dDef: Direct
      p1: Parametric | pname = f; plistarr = 10^(range(5,-0.1,-4)); punit = Hz
      fc1: FullyCoupled | linsolver = dDef

Datasets
  dset1: Solution | solution = sol1
  dset3: Solution "Probe Solution 3" | solution = sol3
  avh1: Average "Domain Probe 1" on domains 5 | data = dset3
  dset4: Solution | solution = sol3
  avh2: Average "Domain Probe 2" on domains 1 | data = dset3
  avh4: Average "Domain Probe 3" on domains 5 | data = dset3
  avh5: Average "Domain Probe 4" on domains 1 | data = dset3

Derived values
  pev1: EvalPoint "Domain Probe 1" | data = avh1; table = tbl1; expr = psi11
  pev2: EvalPoint "Domain Probe 2" | data = avh2; table = tbl1; expr = psi11
  pev4: EvalPoint "Domain Probe 3" | data = avh4; table = tbl2; expr = psi
  pev5: EvalPoint "Domain Probe 4" | data = avh5; table = tbl2; expr = psi
  gev1: EvalGlobal "Global Variable Probe 1" | data = dset3; table = tbl1; expr = -intop2(ny*psi11y)/(w_elec*x_to_y)*L
  gev2: EvalGlobal "Global Variable Probe 2" | data = dset3; table = tbl2; expr = -intop2(ny*psiy)/(w_elec*x_to_y)*L

Tables
  tbl1: Table "Probe Table 1"
    f (Hz) | psi11_ref_o1 (1), Domain Probe 1 | psi11_ref_o2 (1), Domain Probe 2 | i_Sigma11 (1)
    100000 | 1-5.1457e-13i | -4.40844e-10-7.829e-10i | 1.00626+0.0134182i
    79432.8 | 1-5.06948e-13i | 4.44419e-10-7.10491e-10i | 1.00561+0.0164559i
    63095.7 | 1-4.75925e-13i | 1.46169e-09+4.88454e-11i | 1.00478+0.0201702i
    50118.7 | 1-4.10528e-13i | 1.98077e-09+1.58387e-09i | 1.00372+0.0247105i
    39810.7 | 1-2.96439e-13i | 1.39255e-09+3.20037e-09i | 1.00235+0.0302554i
    31622.8 | 1-1.15219e-13i | 1.82024e-10+3.6642e-09i | 1.00056+0.0370167i
    25118.9 | 1+1.56623e-13i | 1.19063e-10+2.91753e-09i | 0.998193+0.0452423i
    19952.6 | 1+5.48716e-13i | 1.92167e-09+2.75872e-09i | 0.99505+0.0552168i
    15848.9 | 1+1.09809e-12i | 4.45247e-09+3.7796e-09i | 0.990832+0.067257i
    12589.3 | 1+1.85045e-12i | 8.61815e-09+5.19851e-09i | 0.985137+0.0816987i
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  tbl2: Table "Probe Table 2"
    f (Hz) | psi_ref_o1 (1), Domain Probe 3 | psi_ref_o2 (1), Domain Probe 4 | i_Sigma (1)
    100000 | 2.39019 | 8.70305e-07 | 0.0641439
    79432.8 | 2.39019 | 8.70305e-07 | 0.0641439
    63095.7 | 2.39019 | 8.70305e-07 | 0.0641439
    50118.7 | 2.39019 | 8.70305e-07 | 0.0641439
    39810.7 | 2.39019 | 8.70305e-07 | 0.0641439
    31622.8 | 2.39019 | 8.70305e-07 | 0.0641439
    25118.9 | 2.39019 | 8.70305e-07 | 0.0641439
    19952.6 | 2.39019 | 8.70305e-07 | 0.0641439
    15848.9 | 2.39019 | 8.70305e-07 | 0.0641439
    12589.3 | 2.39019 | 8.70305e-07 | 0.0641439
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
Plots
  pg4: PlotGroup2D "psi solution" | data = dset1
    surf1: Surface | expr = psi*phi_star
    con1: Contour | expr = psi
  pg1: PlotGroup2D "psi11 solution" | data = dset4
    surf1: Surface | expr = psi11
  pg7: PlotGroup1D "Probe Plot - psi"
    tblp1: Table "Probe Table Graph 1" | table = tbl2
  pg6: PlotGroup2D "psi11 solution - contour" | data = dset4
    con1: Contour | expr = psi11
  pg2: PlotGroup1D "Probe Plot - psi11"
    tblp1: Table "Probe Table Graph 1" | table = tbl1; plotcolumns = {2, 3, 4}
  pg3: PlotGroup1D "Impedance using o1 reference (ref o1)" | data = dset4; preserveaspect = on
    lngr1: LineGraph on boundaries 1-3, 5, 6, 8-16 | expr = -imag(Z); xdata = expr; xdataexpr = real(Z)
    lngr2: LineGraph on boundaries 1-3, 5, 6, 8-16 | expr = -imag(Z1_ref_o1); xdata = expr; xdataexpr = real(Z1_ref_o1)
    lngr3: LineGraph on boundaries 1-3, 5, 6, 8-16 | expr = -imag(Z2_ref_o1); xdata = expr; xdataexpr = real(Z2_ref_o1)
  pg5: PlotGroup1D "Impedance using o2 reference (ref o2)" | data = dset4; preserveaspect = on
    lngr1: LineGraph on boundaries 1-3, 5, 6, 8-16 | expr = -imag(Z); xdata = expr; xdataexpr = real(Z)
    lngr2: LineGraph on boundaries 1-3, 5, 6, 8-16 | expr = -imag(Z1_ref_o2); xdata = expr; xdataexpr = real(Z1_ref_o2)
    lngr3: LineGraph on boundaries 1-3, 5, 6, 8-16 | expr = -imag(Z2_ref_o2); xdata = expr; xdataexpr = real(Z2_ref_o2)