// COMSOL Multiphysics 5.6.0.341 model "iV_model.mph"
// Outline of the model tree

Parameters
  phi_star = 30.42 [mV]
  kappa_1 = 1.0E-4
  kappa_2 = 10
  w_elec = 1.342[cm]
  L = 100 [um]
  x_to_y = 0.2  // scale between x-axis and y-axis
  scale_ND = 1[m]/L
  L_ND = 1 [m]
  d_ND = lambda*x_to_y [m]
  w_elec_ND = w_elec*x_to_y*scale_ND
  w_big_ND = w_elec_ND+d_ND*2
  ref_distance_ND = w_elec_ND/2
  k = 20 [S/m]
  Z_star = L/k
  lambda = 10 [1]
  ref_zone_ND = w_elec_ND/20
  i_Sigma = 0.1 [A/cm^2]
  i_star = phi_star*k/L
  i_Sigma_bar = i_Sigma/i_star
  theta = 2 [1]

Variables
  var1 "Variables 1"
    V_EQ = 1.17 [V]
    V_cell = gamma*phi_star+V_EQ
    V_anode = (gamma-psi_ref_o1)*phi_star+V_EQ
    V_cathode = psi_ref_o2*phi_star

Couplings
  intop2: Integration "Integration 2 - bottom electrode integration" on boundaries 8

Probes
  dom3: Domain "Domain Probe 3" on domains 5
    probename = psi_ref_o1
    expr = psi
    unit = 1
    descr = psi_ref_o1
    table = tbl1
  dom4: Domain "Domain Probe 4" on domains 1
    probename = psi_ref_o2
    expr = psi
    unit = 1
    descr = psi_ref_o2
    table = tbl1
  var1: GlobalVariable "Global Variable Probe 1" | probename = var_gamma; expr = gamma; unit = 1; table = tbl1

Geometry
  geom1 "Geometry 1" (2D, length unit m)
    r1: Rectangle | pos = {-(w_big_ND/2+ref_distance_ND), 0}; size = {(w_big_ND)+ref_distance_ND*2, 1}
    ls1: LineSegment | specify1 = coord; coord1 = {w_big_ND/2, 1}; specify2 = coord; coord2 = {w_elec_ND/2, 0}
    ls2: LineSegment
      specify1 = coord
      coord1 = {w_big_ND/2+ref_distance_ND-ref_zone_ND, 0}
      specify2 = coord
      coord2 = {w_big_ND/2+ref_distance_ND-ref_zone_ND, 1}
    ls3: LineSegment | specify1 = coord; coord1 = {-w_big_ND/2, 0}; specify2 = coord; coord2 = {-w_elec_ND/2, 1}
    ls4: LineSegment
      specify1 = coord
      coord1 = {-(w_big_ND/2+ref_distance_ND-ref_zone_ND), 0}
      specify2 = coord
      coord2 = {-(w_big_ND/2+ref_distance_ND-ref_zone_ND), 1}
    fin: Finalize "Form Union"

Physics
  c1: CoefficientFormPDE on all domains
    dependent variable psi
    Units.CustomDependentVariableUnit = 1
    Units.CustomSourceTermUnit = 1/m^2
    cfeq1: CoefficientFormPDE (default) | c = {x_to_y^2, 0, 0, 1}
    zflx1: ZeroFluxBoundary "Zero Flux 1" (default)
    init1: init "Initial Values 1" (default) | psi = 0.; phi = 0.2
    flux1: FluxBoundary "Flux/Source 1" on boundaries 9 | g = kappa_1/lambda*sinh(gamma-psi)/(1 [m])
    flux2: FluxBoundary "Flux/Source 2" on boundaries 8 | g = -kappa_2/lambda*sinh(theta*psi)/(1 [m])
  ge: GlobalEquations "Global ODEs and DAEs"
    ge1: GlobalEquations
      name = gamma
      equation = i_Sigma_bar+intop2(ny*psiy)/(w_elec_ND)*(1[m])
      initialValueU = 10
      valueType = complex
      DependentVariableQuantity = dimensionless
      CustomDependentVariableUnit = m
      SourceTermQuantity = dimensionless
      CustomSourceTermUnit = m

Mesh
  mesh1 "Mesh 1"
    size: MeshSizeDefault | hmax = 0.1; hmin = 5E-4; hauto = 1; custom = on
    size1: Size on points 6-8 | hmax = 1.0E-3; hauto = 1; custom = on
    size2: Size (disabled) on boundaries 10 | hauto = 1
    ftri1: FreeTri "Free Triangular 1" on remaining entities | xscale = x_to_y

Studies
  std1 "Study 1"
    stat: Stationary
      useparam = on
      pname = i_Sigma
      plistarr = 0.01,0.02,0.04,0.05,0.06,0.08,0.1,0.15,0.2,0.3,0.4,range(0.5,0.25,4)
      punit = A/cm^2

Solver configurations
  sol1 "Solution 1" (study std1)
    v1: Variables "Dependent Variables 1"
    s1: Stationary "Stationary Solver 1" | stol = 1e-8
      dDef: Direct
      fc1: FullyCoupled | linsolver = dDef
      pDef: Parametric

Datasets
  dset1: Solution | solution = sol1
  dset2: Solution "Probe Solution 2" | solution = sol1
  avh2: Average "Domain Probe 3" on domains 5 | data = dset2
  avh3: Average "Domain Probe 4" on domains 1 | data = dset2

Derived values
  pev2: EvalPoint "Domain Probe 3" | data = avh2; table = tbl1; expr = psi
  pev3: EvalPoint "Domain Probe 4" | data = avh3; table = tbl1; expr = psi
  gev2: EvalGlobal "Global Variable Probe 1" | data = dset2; table = tbl1; expr = gamma

Tables
  tbl1: Table "Probe Table 1"
    i_Sigma (A/cm^2) | psi_ref_o1 (1), Domain Probe 3 | psi_ref_o2 (1), Domain Probe 4 | gamma (1)
    0.01 | 0.611031 | 6.59982e-06 | 8.08233
    0.02 | 0.957114 | 1.34211e-05 | 8.81737
    0.04 | 1.4134 | 2.74531e-05 | 9.58467
    0.05 | 1.58611 | 3.46251e-05 | 9.84303
    0.06 | 1.73762 | 4.18878e-05 | 10.0599
    0.08 | 1.99771 | 5.66596e-05 | 10.4156
    0.1 | 2.21944 | 7.17255e-05 | 10.7057
    0.15 | 2.67631 | 0.000110458 | 11.276
    0.2 | 3.05265 | 0.000150369 | 11.7256
    0.3 | 3.67912 | 0.000232301 | 12.4475
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
Plots
  pg4: PlotGroup2D "psi solution" | data = dset1
    surf1: Surface | expr = psi
  pg5: PlotGroup1D "Probe Plot - psi" | data = none
    tblp1: Table "Probe Table Graph 1" | table = tbl1
  pg6: PlotGroup1D "1D Plot Group 6 - polarization curve"
    data = dset1
    xlabel = current density (A/cm<sup>2</sup>)
    ylabel = Potential (V)
    lngr1: LineGraph on all boundaries | expr = V_cell; xdata = expr; xdataexpr = i_Sigma
    lngr2: LineGraph on all boundaries | expr = V_cathode; xdata = expr; xdataexpr = i_Sigma
    lngr3: LineGraph on all boundaries | expr = V_anode; xdata = expr; xdataexpr = i_Sigma